echo               both

include            in.vars
dimension          ${ndim}
units              si
atom_modify        map array sort 0 0
atom_style         hybrid meso bond
comm_modify        vel yes

read_data          data.polymer
include            in.swimmer

variable        Natoms equal count(all)
if ${ndim}==2 then "variable        domain_volume equal ${Lx}*${Ly}"
variable       sph_mass equal ${sph_rho}*${domain_volume}/${Natoms}
mass           * ${sph_mass}

pair_style         hybrid/overlay sph/rhosum 1 sph/taitwater
pair_coeff * *     sph/taitwater ${sph_rho0} ${sph_c} ${sph_eta} ${h}
pair_coeff * *     sph/rhosum ${h}

# set forces into the head and the tail of the swimmer

# do full time integration
fix                integrate_fix_full all  meso

neighbor           ${h} bin

include            settimestep.lmp
timestep           ${dt}

variable           force_sdpd_fx equal fx[1]
variable           force_sdpd_fy equal fy[1]

compute            rho_peratom all meso_rho/atom

dump               myDump all image 1000 dump.*.jpg type type adiam 0.05 bond type 0.02 zoom 15 size 2024 200
dump_modify        myDump pad 7

dump               d0 all custom 1000 dump.sph_sw id type x y vx vy c_rho_peratom
dump_modify        d0 pad 7

run                100000000

print              "f: ${force_sdpd_fx} ${force_sdpd_fy}"
